# [component: outputs alpha_total_dB_data]
Rin := 0.22*10^-3
Rout := 0.9*10^-3
freq0 := 50*10^6
epsilon_re := 2.79
mu0 := 4*π*10^-7
epsilon0 := 8.85*10^-12
Tmin := 20
Tmax := 600
Fmin := 10^7
Fmax := 10^8
res_cond_T(temp) := 1.72*10^-8*(1 + 3.8*10^-3*(temp - 20))
alpha_total_dB(freq) := linterp(alpha_total_dB_data[:, 0], alpha_total_dB_data[:, 1], freq)
sigma_cond_T(temp) := 1/res_cond_T(temp)
delta_T(freq, temp) := sqrt(2/(sigma_cond_T(temp)*mu0*2*π*freq))
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delta_T(10^7, 20) = 2.0873e-5
R := res_cond_T(20)/(π*Rin^2) = 0.113118
R_cond_T(freq, temp) := 1/(2*π)*(1/(sigma_cond_T(temp)*delta_T(freq, temp)*Rin) + 1/(sigma_cond_T(temp)*delta_T(freq, temp)*Rout))
L_cond_T(freq, temp) := mu0/(2*π)*ln(Rout/Rin) + mu0*delta_T(freq, temp)/(4*π)*(1/Rin + 1/Rout)
C_diel := 2*π*epsilon0*epsilon_re/ln(Rout/Rin) = 1.10126e-10
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delta_L_cond_T := L_cond_T(Fmin, Tmax)/L_cond_T(Fmax, Tmin) = 1.06095
delta_L_freq := L_cond_T(freq0, Tmax)/L_cond_T(freq0, Tmin) = 1.01453
Zc0_T(freq, temp) := sqrt(L_cond_T(freq, temp)/C_diel)
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delta_Zc0_T := Zc0_T(Fmin, Tmax)/Zc0_T(Fmax, Tmin) = 1.03002
alpha_cond_T(freq, temp) := R_cond_T(freq, temp)/(2*Zc0_T(freq, temp))
res_diel(temp) := 2.2*10^13*e^(-0.035*temp)
sigma_diel(temp) := 1/res_diel(temp)
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Zc := 138*sqrt(1/epsilon_re)*log(Rout/Rin)  # disabled
alpha_total_dB_T(freq, temp) := alpha_total_dB(freq) + 0.025*10^(0.05*0.045*(temp - 20))  # disabled
alpha_total_dB_T(freq, temp) := alpha_total_dB(freq) + 1*10^-3*(temp - 20)
epsilon_im_T(freq, temp) := 2*alpha_diel_T(freq, temp)/(2*π*freq)*sqrt(epsilon_re/epsilon0)  # disabled
alpha_cond_dB_T(freq, temp) := alpha_cond_T(freq, temp)*8.686
G_diel_T1(freq, temp) := 2*alpha_diel_T(freq, temp)*C_diel/sqrt(epsilon0*epsilon_re*mu0)  # disabled
alpha_diel_dB_T(freq, temp) := alpha_total_dB_T(freq, temp) - alpha_cond_dB_T(freq, temp)
alpha_diel_T(freq, temp) := alpha_diel_dB_T(freq, temp)/8.686
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G_diel_T(freq, temp) := 2*alpha_diel_T(freq, temp)/Zc0_T(freq, temp)
epsilon_im_T(freq, temp) := G_diel_T(freq, temp)*ln(Rout/Rin)/(2*π*2*π*freq*epsilon0)
eps_im_cond(freq, temp) := sigma_diel(temp)/(2*π*freq*epsilon0)
tan_delta(freq, temp) := (epsilon_im_T(freq, temp) - eps_im_cond(freq, temp))/epsilon_re
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cond_diel_ratio(freq, temp) := alpha_cond_dB_T(freq, temp)/alpha_diel_dB_T(freq, temp)
epsilon_im_T_mesh := CreateMesh(epsilon_im_T, Fmin, Fmax, Tmin, Tmax, 20, 20)
Zl := 5
cond_diel_ratio_mesh := CreateMesh(cond_diel_ratio, Fmin, Fmax, Tmin, Tmax, 100, 100)
# [component: inputs cond_diel_ratio_mesh]
GAMMA_T(freq, temp) := (Zl - Zc0_T(freq, temp))/(Zl + Zc0_T(freq, temp))
# [component: inputs epsilon_im_T_mesh]
VSWR_cable_T(freq, temp) := (1 + GAMMA_T(freq, temp))/(1 - GAMMA_T(freq, temp))
